# CLIENT | SECTION
# PROJECT | SHEET | OF
# JOB No | DRAWING NO
# CALCULATION BY | DATE
# CHECKED BY | DATE
# APPROVED BY | DATE
# OBJECT
# Select Print Preview or Print from the File menu to see the headers and footers for this form.
#
# Click on Header and Footer from the View menu to see how they were set up.
# Velocity of light in vacuum
c := 299792458*m/sec
# Permeability of vacuum
μ_0 := 4*π*10^-7*newton/amp^2
# Permittivity of vacuum
ε_0 := 8.854187817*10^-12*farad/m
# Elementary charge
q_e := 1.60217733*10^-19*coul
# Boltzmann's constant
k_b := 1.380658*10^-23*joule/K
# Planck constant
h_p := 6.626*10^-34*J*s
m_e := 9.10938188*10^-31*kg
# Units:
eV := q_e*V
ns := 10^-9*sec
mJ := 10^-3*J
nJ := 10^-9*J
nm := 10^-9*m
μm := 10^-6*m
fs := 10^-15*s
μJ := 10^-6*J
# ref: Springer Handbook Of Lasers And Optics (p. 968)
ω_func(λ) := c*2*π/λ
λ_0 := 810*nm
ω_0 := ω_func(λ_0) = 2.3255 1/fs
Δλ := 32*nm/sqrt(2*ln(2)) = 27.1783 nm  # waist
ω_L := ω_func(λ_0 - Δλ/2) = 2.36518e15 1/s
ω_R := ω_func(λ_0 + Δλ/2) = 2.28713 1/fs
Δω := ω_L - ω_R = 0.0780504 fs^-1
I_λ(λ) := e^(-2*(λ - λ_0)^2/Δλ^2)*W*cm^-2
I_spectrum(ω) := I_λ(c*2*π/ω)
E_plus_ω(ω) := sqrt(π/(ε_0*c)*I_spectrum(ω))*e^(-1i*0)  # (12.17)
Range_Meter_Left := 200*nm
ω_Right := ω_func(Range_Meter_Left) = 9.41826e15 1/s
Range_Meter_Right := 1050*nm
ω_Left := ω_func(Range_Meter_Right) = 1.79395e15 1/s
Δλ_meter := 1*nm
N_points := 2^12
a := 0 .. N_points
log(3646)/log(2) = 11.8321
ω_vec[a] := ω_func(Range_Meter_Left + a*Δλ_meter)
length(ω_vec) = 4097
ω_vec[0] = 9.41826e15 1/s
ω_vec[1024] = 1.53893e15 1/s
a_center := (λ_0 - Range_Meter_Left)/Δλ_meter = 610
λ_vec[a] := Range_Meter_Left + (Range_Meter_Right - Range_Meter_Left)/N_points*a
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E_plus_ω(ω_0) = 3440.25 V/m
ω_0 = 2.3255e15 1/s
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λ_vec[a]*10^9 =  # no stored result
I_λ(λ_vec[a])/max(I_λ(λ_vec)) =  # no stored result
E_plus_t(t) := 1/(2*π)*integral(E_plus_ω(ω)*e^(1i*ω*t), ω = 0*ω_R .. 2*ω_R)
E_plus_ω_vec := E_plus_ω(ω_vec)
time_int := 200*fs/N_points = 0.0488281 fs
t_vec[a] := -100*fs + a*time_int
I_t_vec[a] := |E_plus_t(t_vec[a])|^2
coe_max := max(I_t_vec) = 5.75368e29 kg*W*m^2/(A^2*cm^2*s^5)
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